<?xml version="1.0"?>
<fdm_config name="Cessna C-172 Skyhawk (Basic)" version="2.0" release="BETA">
    <fileheader>
        <author>JSBSim Web Demo</author>
        <note>Simplified Cessna 172 for web browser demo</note>
        <description>Basic Cessna 172 model for browser demonstration</description>
    </fileheader>

    <metrics>
        <wingarea unit="FT2"> 174.0 </wingarea>
        <wingspan unit="FT"> 36.0 </wingspan>
        <chord unit="FT"> 4.9 </chord>
        <htailarea unit="FT2"> 21.9 </htailarea>
        <htailarm unit="FT"> 15.7 </htailarm>
        <vtailarea unit="FT2"> 16.5 </vtailarea>
        <vtailarm unit="FT"> 15.7 </vtailarm>

        <location name="AERORP" unit="IN">
            <x> 43.2 </x>
            <y> 0.0 </y>
            <z> 59.4 </z>
        </location>

        <location name="EYEPOINT" unit="IN">
            <x> 37.0 </x>
            <y> 0.0 </y>
            <z> 35.0 </z>
        </location>

        <location name="VRP" unit="IN">
            <x> 43.2 </x>
            <y> 0.0 </y>
            <z> 59.4 </z>
        </location>
    </metrics>

    <mass_balance>
        <ixx unit="SLUG*FT2"> 1285.32 </ixx>
        <iyy unit="SLUG*FT2"> 1824.93 </iyy>
        <izz unit="SLUG*FT2"> 2666.89 </izz>
        <ixy unit="SLUG*FT2"> 0.0 </ixy>
        <ixz unit="SLUG*FT2"> -25.59 </ixz>
        <iyz unit="SLUG*FT2"> 0.0 </iyz>
        <emptywt unit="LBS"> 1500.0 </emptywt>

        <location name="CG" unit="IN">
            <x> 43.2 </x>
            <y> 0.0 </y>
            <z> 59.4 </z>
        </location>
    </mass_balance>

    <ground_reactions>
        <contact type="BOGEY" name="NOSE">
            <location unit="IN">
                <x> 12.0 </x>
                <y> 0.0 </y>
                <z> 85.0 </z>
            </location>
            <static_friction> 0.8 </static_friction>
            <dynamic_friction> 0.5 </dynamic_friction>
            <rolling_friction> 0.02 </rolling_friction>
            <spring_coeff unit="LBS/FT"> 2000.0 </spring_coeff>
            <damping_coeff unit="LBS/FT/SEC"> 500.0 </damping_coeff>
        </contact>

        <contact type="BOGEY" name="LEFT_MAIN">
            <location unit="IN">
                <x> 45.0 </x>
                <y> -72.0 </y>
                <z> 85.0 </z>
            </location>
            <static_friction> 0.8 </static_friction>
            <dynamic_friction> 0.5 </dynamic_friction>
            <rolling_friction> 0.02 </rolling_friction>
            <spring_coeff unit="LBS/FT"> 5000.0 </spring_coeff>
            <damping_coeff unit="LBS/FT/SEC"> 1000.0 </damping_coeff>
        </contact>

        <contact type="BOGEY" name="RIGHT_MAIN">
            <location unit="IN">
                <x> 45.0 </x>
                <y> 72.0 </y>
                <z> 85.0 </z>
            </location>
            <static_friction> 0.8 </static_friction>
            <dynamic_friction> 0.5 </dynamic_friction>
            <rolling_friction> 0.02 </rolling_friction>
            <spring_coeff unit="LBS/FT"> 5000.0 </spring_coeff>
            <damping_coeff unit="LBS/FT/SEC"> 1000.0 </damping_coeff>
        </contact>
    </ground_reactions>

    <propulsion>
        <engine file="eng_io360c">
            <location unit="IN">
                <x> 33.0 </x>
                <y> 0.0 </y>
                <z> 59.4 </z>
            </location>
            <orient unit="DEG">
                <pitch> 0.0 </pitch>
                <roll> 0.0 </roll>
                <yaw> 0.0 </yaw>
            </orient>
            <feed>0</feed>
            <thruster file="prop_generic">
                <location unit="IN">
                    <x> 33.0 </x>
                    <y> 0.0 </y>
                    <z> 59.4 </z>
                </location>
                <orient unit="DEG">
                    <pitch> 0.0 </pitch>
                    <roll> 0.0 </roll>
                    <yaw> 0.0 </yaw>
                </orient>
            </thruster>
        </engine>

        <tank type="FUEL" number="0">
            <location unit="IN">
                <x> 48.0 </x>
                <y> 0.0 </y>
                <z> 59.4 </z>
            </location>
            <capacity unit="LBS"> 212.0 </capacity>
            <contents unit="LBS"> 106.0 </contents>
        </tank>
    </propulsion>

    <flight_control name="c172x">
        <channel name="Pitch">
            <summer name="Pitch Trim Sum">
                <input>fcs/elevator-cmd-norm</input>
                <input>fcs/pitch-trim-cmd-norm</input>
                <clipto>
                    <min> -1 </min>
                    <max>  1 </max>
                </clipto>
            </summer>

            <aerosurface_scale name="Elevator Control">
                <input>fcs/pitch-trim-sum</input>
                <range>
                    <min> -0.35 </min>
                    <max>  0.35 </max>
                </range>
                <output>fcs/elevator-pos-rad</output>
            </aerosurface_scale>
        </channel>

        <channel name="Roll">
            <summer name="Roll Trim Sum">
                <input>fcs/aileron-cmd-norm</input>
                <input>fcs/roll-trim-cmd-norm</input>
                <clipto>
                    <min> -1 </min>
                    <max>  1 </max>
                </clipto>
            </summer>

            <aerosurface_scale name="Left Aileron Control">
                <input>fcs/roll-trim-sum</input>
                <range>
                    <min> -0.35 </min>
                    <max>  0.35 </max>
                </range>
                <output>fcs/left-aileron-pos-rad</output>
            </aerosurface_scale>

            <aerosurface_scale name="Right Aileron Control">
                <input>-fcs/roll-trim-sum</input>
                <range>
                    <min> -0.35 </min>
                    <max>  0.35 </max>
                </range>
                <output>fcs/right-aileron-pos-rad</output>
            </aerosurface_scale>
        </channel>

        <channel name="Yaw">
            <summer name="Rudder Command Sum">
                <input>fcs/rudder-cmd-norm</input>
                <input>fcs/yaw-trim-cmd-norm</input>
                <clipto>
                    <min> -1 </min>
                    <max>  1 </max>
                </clipto>
            </summer>

            <aerosurface_scale name="Rudder Control">
                <input>fcs/rudder-command-sum</input>
                <range>
                    <min> -0.35 </min>
                    <max>  0.35 </max>
                </range>
                <output>fcs/rudder-pos-rad</output>
            </aerosurface_scale>
        </channel>
    </flight_control>

    <aerodynamics>
        <axis name="LIFT">
            <function name="aero/coefficient/CLalpha">
                <description>Lift_due_to_alpha</description>
                <product>
                    <property>aero/qbar-psf</property>
                    <property>metrics/Sw-sqft</property>
                    <value>5.5</value>
                    <property>aero/alpha-rad</property>
                </product>
            </function>
        </axis>

        <axis name="DRAG">
            <function name="aero/coefficient/CD0">
                <description>Drag_at_zero_lift</description>
                <product>
                    <property>aero/qbar-psf</property>
                    <property>metrics/Sw-sqft</property>
                    <value>0.025</value>
                </product>
            </function>
        </axis>

        <axis name="SIDE">
            <function name="aero/coefficient/CYb">
                <description>Side_force_due_to_beta</description>
                <product>
                    <property>aero/qbar-psf</property>
                    <property>metrics/Sw-sqft</property>
                    <value>-0.35</value>
                    <property>aero/beta-rad</property>
                </product>
            </function>
        </axis>

        <axis name="ROLL">
            <function name="aero/coefficient/Clb">
                <description>Roll_moment_due_to_beta</description>
                <product>
                    <property>aero/qbar-psf</property>
                    <property>metrics/Sw-sqft</property>
                    <property>metrics/bw-ft</property>
                    <value>-0.1</value>
                    <property>aero/beta-rad</property>
                </product>
            </function>
        </axis>

        <axis name="PITCH">
            <function name="aero/coefficient/Cmalpha">
                <description>Pitch_moment_due_to_alpha</description>
                <product>
                    <property>aero/qbar-psf</property>
                    <property>metrics/Sw-sqft</property>
                    <property>metrics/cbarw-ft</property>
                    <value>-0.5</value>
                    <property>aero/alpha-rad</property>
                </product>
            </function>
        </axis>

        <axis name="YAW">
            <function name="aero/coefficient/Cnb">
                <description>Yaw_moment_due_to_beta</description>
                <product>
                    <property>aero/qbar-psf</property>
                    <property>metrics/Sw-sqft</property>
                    <property>metrics/bw-ft</property>
                    <value>0.06</value>
                    <property>aero/beta-rad</property>
                </product>
            </function>
        </axis>
    </aerodynamics>
</fdm_config>
